# read
read tie.frd
read tie.inp nom
# view
view disp
view elem
rot y
rot l 10
rot u 5
# def
ds -1 e 4
plot f all n
# store
hcpy png
sys mv hcpy_1.png Refs/def.png
# color plot of worst ps
ds -0 e 23
plus e Eind n
hcpy png
sys mv hcpy_2.png Refs/worstPS.png
